*Heading
** Job name: FinalJOB Model name: Model-1
** Generated by: Abaqus/CAE 2017
*Preprint, echo=NO, model=NO, history=NO, contact=NO
**
** PARTS
**
*Part, name=GJSlim
*End Part
**
**
** ASSEMBLY
**
*Assembly, name=Assembly
**
*Instance, name=GJSlim-1, part=GJSlim
*Node
      1, -0.899999976,           0.,  0.200000003
      2, -0.899999976, -0.200000003,  0.200000003
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*Element, type=DC3D20
 1,   56,  329,  926,  311,    1,   29,  293,   40, 1379, 1378, 1377, 1376, 1380, 1381, 1382,
    1383, 1385, 1384, 1386, 1387
 2,  329,  330,  927,  926,   29,   30,  294,  293, 1390, 1389, 1388, 1378, 1391, 1392, 1393,
    1381, 1384, 1394, 1395, 1386
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*Nset, nset=Set-1, generate
    1,  4925,     1
*Elset, elset=Set-1, generate
   1,  864,    1
** Section: Section1
*Solid Section, elset=Set-1, material=GJSlim
,
*End Instance
**
*Nset, nset=_PickedSet5, internal, instance=GJSlim-1, generate
    1,  4925,     1
*Elset, elset=_PickedSet5, internal, instance=GJSlim-1, generate
   1,  864,    1
*Elset, elset=_Surf-1_S3, internal, instance=GJSlim-1
   1,   2,   3,   4,  17,  18
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*Elset, elset=_Surf-1_S1, internal, instance=GJSlim-1
  49,  50,  51,  52,  53,  54
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*Elset, elset=_Surf-1_S5, internal, instance=GJSlim-1
  13,  14,  15,  16,  29,  30
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*Elset, elset=_Surf-1_S6, internal, instance=GJSlim-1
  65,  69,  73,  77,  81,  85
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*Elset, elset=_Surf-1_S2, internal, instance=GJSlim-1
   1,   2,   3,   4,   5,   6
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*Elset, elset=_Surf-1_S4, internal, instance=GJSlim-1, generate
   4,  864,    4
*Surface, type=ELEMENT, name=Surf-1
_Surf-1_S3, S3
_Surf-1_S1, S1
_Surf-1_S6, S6
_Surf-1_S2, S2
_Surf-1_S4, S4
_Surf-1_S5, S5
*End Assembly
**
** MATERIALS
**
*Material, name=GJSlim
*Conductivity
36.,  25.
34., 200.
31., 400.
28., 600.
25., 800.
22.,1000.
18.,1200.
16.,1300.
14.,1400.
*Density
7100.,
*Latent Heat
270.,1140.,1270.
*Specific Heat
 500.,  25.
 520., 100.
 550., 300.
 620., 500.
 750., 700.
 850., 900.
 930.,1100.
1000.,1200.
1200.,1300.
1100.,1400.
**
** PREDEFINED FIELDS
**
** Name: Predefined Field-1   Type: Temperature
*Initial Conditions, type=TEMPERATURE
_PickedSet5, 1500.
** ----------------------------------------------------------------
**
** STEP: Step-1
**
*Step, name=Step-1, nlgeom=NO, inc=5000
*Heat Transfer, end=PERIOD, deltmx=50.
10., 5000., 0.05, 100.,
**
** INTERACTIONS
**
** Interaction: Int-1
*Sfilm
Surf-1, F, 25., 1000.
**
** OUTPUT REQUESTS
**
*Restart, write, frequency=0
**
** FIELD OUTPUT: F-Output-1
**
*Output, field
*Node Output
NT, RFL
*Element Output, directions=YES
HFL, TEMP
*Output, history, frequency=0
*End Step
